** Gauge-free short transient; diagnostic stiff nut engagement only.
*INCLUDE,INPUT=mesh.inp
*INCLUDE,INPUT=materials.inp
*INCLUDE,INPUT=nut-coupling.inp
*INCLUDE,INPUT=rigid-carriers.inp
*INCLUDE,INPUT=contact-fragment.inc
*INCLUDE,INPUT=output-sets.inp
*INCLUDE,INPUT=pilot-sets.inp
*AMPLITUDE,NAME=RAMP_N,TIME=TOTAL TIME
0.0000000000000e+00,0.0000000000000e+00
1.0000000000000e-03,2.9800000000000e-04
2.0000000000000e-03,1.1840000000000e-03
3.0000000000000e-03,2.6460000000000e-03
4.0000000000000e-03,4.6720000000000e-03
5.0000000000000e-03,7.2500000000000e-03
6.0000000000000e-03,1.0368000000000e-02
7.0000000000000e-03,1.4014000000000e-02
8.0000000000000e-03,1.8176000000000e-02
9.0000000000000e-03,2.2842000000000e-02
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*STEP,NLGEOM,INC=250
*DYNAMIC,ALPHA=0
2.5000000000000e-03,2.5000000000000e-03,1e-6,2.5e-3
*CLOAD,AMPLITUDE=RAMP_N
7,2,-7.5737851659882e-03
7,3,6.3552126354296e-03
8,2,-7.4568499146791e-03
8,3,6.2570915014514e-03
9,2,-7.4613452474741e-03
9,3,6.2607605261125e-03
12,2,-7.5823449933782e-03
12,3,6.3622905324785e-03
15,2,-3.1998301165788e-04
15,3,2.6849771604689e-04
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*NODE FILE,NSET=PILOT_ALL_NODES,FREQUENCY=1,LAST ITERATIONS,CONTACT ELEMENTS
U,V
*NODE PRINT,NSET=PILOT_MONITOR,FREQUENCY=1
U
*EL PRINT,ELSET=CURRENT_ALL_ELEMENTS,TOTALS=ONLY,FREQUENCY=1
ELSE,ELKE,EMAS,EVOL
*EL PRINT,ELSET=CURRENT_NUT_CARRIERS,TOTALS=ONLY,FREQUENCY=1
ELSE,ELKE
*CONTACT PRINT,FREQUENCY=1
CDIS,CSTR,CELS,CNUM
*CONTACT FILE,FREQUENCY=1
CDIS,CSTR,CELS
*CONTACT PRINT,SLAVE=WJCP_001_S,MASTER=WJCP_001_M,FREQUENCY=1
CF,CFN,CFS
*CONTACT PRINT,SLAVE=WJCP_002_S,MASTER=WJCP_002_M,FREQUENCY=1
CF,CFN,CFS
*CONTACT PRINT,SLAVE=WJCP_003_S,MASTER=WJCP_003_M,FREQUENCY=1
CF,CFN,CFS
*CONTACT PRINT,SLAVE=WJCP_004_S,MASTER=WJCP_004_M,FREQUENCY=1
CF,CFN,CFS
*CONTACT PRINT,SLAVE=WJCP_005_S,MASTER=WJCP_005_M,FREQUENCY=1
CF,CFN,CFS
*CONTACT PRINT,SLAVE=WJCP_006_S,MASTER=WJCP_006_M,FREQUENCY=1
CF,CFN,CFS
*CONTACT PRINT,SLAVE=WJCP_007_S,MASTER=WJCP_007_M,FREQUENCY=1
CF,CFN,CFS
*CONTACT PRINT,SLAVE=WJCP_008_S,MASTER=WJCP_008_M,FREQUENCY=1
CF,CFN,CFS
*CONTACT PRINT,SLAVE=WJCP_009_S,MASTER=WJCP_009_M,FREQUENCY=1
CF,CFN,CFS
*CONTACT PRINT,SLAVE=WJCP_010_S,MASTER=WJCP_010_M,FREQUENCY=1
CF,CFN,CFS
*CONTACT PRINT,SLAVE=WJCP_011_S,MASTER=WJCP_011_M,FREQUENCY=1
CF,CFN,CFS
*CONTACT PRINT,SLAVE=WJCP_012_S,MASTER=WJCP_012_M,FREQUENCY=1
CF,CFN,CFS
*CONTACT PRINT,SLAVE=WJCP_013_S,MASTER=WJCP_013_M,FREQUENCY=1
CF,CFN,CFS
*CONTACT PRINT,SLAVE=WJCP_014_S,MASTER=WJCP_014_M,FREQUENCY=1
CF,CFN,CFS
*CONTACT PRINT,SLAVE=WJCP_015_S,MASTER=WJCP_015_M,FREQUENCY=1
CF,CFN,CFS
*CONTACT PRINT,SLAVE=WJCP_016_S,MASTER=WJCP_016_M,FREQUENCY=1
CF,CFN,CFS
*CONTACT PRINT,SLAVE=WJCP_017_S,MASTER=WJCP_017_M,FREQUENCY=1
CF,CFN,CFS
*CONTACT PRINT,SLAVE=WJCP_018_S,MASTER=WJCP_018_M,FREQUENCY=1
CF,CFN,CFS
*CONTACT PRINT,SLAVE=WJCP_019_S,MASTER=WJCP_019_M,FREQUENCY=1
CF,CFN,CFS
*CONTACT PRINT,SLAVE=WJCP_020_S,MASTER=WJCP_020_M,FREQUENCY=1
CF,CFN,CFS
*CONTACT PRINT,SLAVE=WJCP_021_S,MASTER=WJCP_021_M,FREQUENCY=1
CF,CFN,CFS
*CONTACT PRINT,SLAVE=WJCP_022_S,MASTER=WJCP_022_M,FREQUENCY=1
CF,CFN,CFS
*CONTACT PRINT,SLAVE=WJCP_023_S,MASTER=WJCP_023_M,FREQUENCY=1
CF,CFN,CFS
*CONTACT PRINT,SLAVE=WJCP_024_S,MASTER=WJCP_024_M,FREQUENCY=1
CF,CFN,CFS
*CONTACT PRINT,SLAVE=WJCP_025_S,MASTER=WJCP_025_M,FREQUENCY=1
CF,CFN,CFS
*CONTACT PRINT,SLAVE=WJCP_026_S,MASTER=WJCP_026_M,FREQUENCY=1
CF,CFN,CFS
*CONTACT PRINT,SLAVE=WJCP_027_S,MASTER=WJCP_027_M,FREQUENCY=1
CF,CFN,CFS
*CONTACT PRINT,SLAVE=WJCP_028_S,MASTER=WJCP_028_M,FREQUENCY=1
CF,CFN,CFS
*CONTACT PRINT,SLAVE=WJCP_029_S,MASTER=WJCP_029_M,FREQUENCY=1
CF,CFN,CFS
*CONTACT PRINT,SLAVE=WJCP_030_S,MASTER=WJCP_030_M,FREQUENCY=1
CF,CFN,CFS
*CONTACT PRINT,SLAVE=WJCP_031_S,MASTER=WJCP_031_M,FREQUENCY=1
CF,CFN,CFS
*CONTACT PRINT,SLAVE=WJCP_032_S,MASTER=WJCP_032_M,FREQUENCY=1
CF,CFN,CFS
*CONTACT PRINT,SLAVE=WJCP_033_S,MASTER=WJCP_033_M,FREQUENCY=1
CF,CFN,CFS
*CONTACT PRINT,SLAVE=WJCP_034_S,MASTER=WJCP_034_M,FREQUENCY=1
CF,CFN,CFS
*CONTACT PRINT,SLAVE=WJCP_035_S,MASTER=WJCP_035_M,FREQUENCY=1
CF,CFN,CFS
*RESTART,WRITE,FREQUENCY=1
*END STEP
