** Isolated two-mass relative-q implicit dynamic implementation fixture.
** Scalar DOF1 stand-in for the current joint's dependent-first actuator.
*NODE
36162,0,0,0
2,1,0,0
117162,0,1,0
*ELEMENT,TYPE=SPRING2,ELSET=SPRING
1,36162,2
*ELEMENT,TYPE=MASS,ELSET=MASS_ONE
2,36162
*ELEMENT,TYPE=MASS,ELSET=MASS_TWO
3,2
*SPRING,ELSET=SPRING
1,1
1.0
*MASS,ELSET=MASS_ONE
0.001
*MASS,ELSET=MASS_TWO
0.002
*EQUATION
3
36162,1,1,2,1,-1,117162,1,-33.49590462574000
*NSET,NSET=PHYSICAL
36162,2
*NSET,NSET=OUTPUT_NODES
36162,2,117162
*AMPLITUDE,NAME=Q_HISTORY,TIME=STEP TIME
0,0,0.01,0.0001,0.02,0.0003,0.03,0.0002
*STEP,INC=10
*DYNAMIC,ALPHA=0,DIRECT
0.01,0.03
*BOUNDARY
36162,2,3,0
2,2,3,0
*BOUNDARY,AMPLITUDE=Q_HISTORY
117162,1,1,1
*NODE PRINT,NSET=OUTPUT_NODES,FREQUENCY=1
U,RF
*NODE FILE,NSET=PHYSICAL,FREQUENCY=1
U,V,RF
*END STEP
